New RegControl.reg_creguladortension(r:p1udt3910-p1udt4209)p1ud4 transformer=trans_reg_creguladortension(r:p1udt3910-p1udt4209)p1ud4 winding=2 ptratio=59.99631547328862 band=2.4 vreg = 123.60000000000001

New RegControl.reg_creguladortension(r:p1udt1232-p1udt3910)p1ud4 transformer=trans_reg_creguladortension(r:p1udt1232-p1udt3910)p1ud4 winding=2 ptratio=59.99631547328862 band=2.4 vreg = 123.60000000000001
